# REAX potential for high energy Au-SCH3 systems
# Title

# Intialization
units		real
dimension	3
boundary	p p p
atom_style	charge

# Atom Definition
read_data	data.Cu_MoTe2
replicate	1 1 1

# Mass Definition
mass 1 125.90331 # Te
mass 2  95.94    # Mo
mass 3  63.5460  # Cu

# Potential Definition
pair_style	reax/c lmp_control
pair_coeff	* * ffield.reax.MoTeCu Te Mo Cu

neighbor	2 bin
neigh_modify	every 10 delay 0 check no

# output
thermo_style    one #custom step etotal temp lx vol press
thermo          50

# relax structure, 0 K
fix				f1 all qeq/reax 1 0.0 10.0 1e-6 reax/c
fix             f2 all box/relax iso 0.0
minimize        1.0e-10 0.0 1000 100000
unfix           f1
unfix           f2

# initial velocity settings
group           cluster type 1
velocity       cluster  create  340 4928459 rot yes mom yes dist gaussian

# Berendsen thermostat (from 340 K to 380 K)
fix		1 all nve
fix		2 all qeq/reax 1 0.0 10.0 1e-6 reax/c
fix		3 all temp/berendsen 340 380 100.0 # damping constant, 100 fs = 0.1 ps

#fix		4 all reax/c/bonds 100 bonds.reaxc
#fix		5 all reax/c/species 50 1 50 species.reaxc

timestep	0.50 # 0.50 fs

# ovito settings
dump		d1 all cfg 50 cfg/run.*.cfg mass type xs ys zs id type q
dump_modify	d1 element Te Mo Cu

# gnuplot settings
variable	energy equal etotal
variable	temperature equal temp
fix			fout1 all ave/time 1 50 50 v_energy v_temperature file out_energy.txt

# Run the simulation
run			40000 # 20 ps
